<Node dt="0.02" name="root">
    <RequiredPlugin name="SofaMiscCollision"/>
    <RequiredPlugin name="ZyPositionBasedDynamics"/>

    <!-- animation loop -->
    <SofaPBDAnimationLoop/>

    <!-- Line models -->
    <Node name="PBDThreadModel1">
        <MeshObjLoader name="meshLoader1" filename="mesh/line_vertices.obj" />
        <SofaPBDLineModel name="pdbLineModel1" dx="0.0000" dy="-1.0000" dz="0.0" rx="0.0000" ry="30.0000" rz="0.0000" src="@meshLoader1"/>
    </Node>

    <Node name="PBDThreadModel2">
        <MeshObjLoader name="meshLoader2" filename="mesh/line_vertices2.obj" />
        <SofaPBDLineModel name="pdbLineModel2" dx="0.0000" dy="1.0000" dz="0.0" rx="0.0000" ry="0.0000" rz="0.0000" src="@meshLoader2"/>
    </Node>

</Node>
